<?xml version="1.0"?>
<?xml-stylesheet type="text/xsl" href="http://jsbsim.sourceforge.net/JSBSim.xsl"?>
<fdm_config name="A320family" version="2.0" release="BETA"
xmlns:xsi="http://www.w3.org/2001/XMLSchema-instance"
xsi:noNamespaceSchemaLocation="http://jsbsim.sourceforge.net/JSBSim.xsd">

<fileheader>
	<author>Joshua Davidson (it0uchpods); D-ECHO</author>
	<version>V0.1 test</version>
	<description>Bombardier Q400</description>
</fileheader>

<metrics>
	<wingarea  unit="M2"> 64 </wingarea>
	<wingspan  unit="M" >  28.4 </wingspan>
	<wing_incidence>          1.03 </wing_incidence>
	<chord     unit="M" >   1.95 </chord>
	<htailarea unit="M2">  10 </htailarea>
	<htailarm  unit="M" >   4.05 </htailarm>
	<vtailarea unit="M2">  15 </vtailarea>
	<vtailarm  unit="M" >   4.9 </vtailarm>

	<location name="AERORP" unit="M">
		<x> 1.62376 </x>
		<y> 0 </y>
		<z> 2.17865 </z>
	</location>

	<location name="EYEPOINT" unit="M">
		<x> -11.19962 </x>
		<y> -0.53995 </y>
		<z> 2.61236 </z>
	</location>

	<location name="VRP" unit="M">
		<x> 0 </x>
		<y> 0 </y>
		<z> 0 </z>
	</location>

</metrics>

<mass_balance>
	<ixx unit="SLUG*FT2">    611903 </ixx>
	<iyy unit="SLUG*FT2">   1735389 </iyy>
	<izz unit="SLUG*FT2">   2301293 </izz>

	<ixy unit="SLUG*FT2">         0 </ixy>
	<ixz unit="SLUG*FT2">         0 </ixz>
	<iyz unit="SLUG*FT2">         0 </iyz>
        <emptywt unit="LBS">39284</emptywt> <!--according to http://www.flyradius.com/bombardier-q400/specifications-dimensions-->


        <location name="CG" unit="M"><!--guess-->
		<x> -0.18866 </x>
		<y> 0 </y>
		<z> 2.46337 </z>
	</location>


</mass_balance>

<ground_reactions>
	<!-- REF-1 page 165 + 271  -->
	<contact type="BOGEY" name="NOSE_LG">
		<location unit="M">
			<x> -12.54159 </x>
			<y> 0 </y>
			<z> 0 </z>
		</location>
		<static_friction> 0.8 </static_friction>
		<dynamic_friction> 0.5 </dynamic_friction>
		<rolling_friction> 0.02 </rolling_friction>
		<spring_coeff unit="LBS/FT"> 30935.5 </spring_coeff>
		<damping_coeff unit="LBS/FT/SEC"> 16978.5 </damping_coeff>
		<max_steer unit="DEG"> 70 </max_steer> <!-- REF-1 page 133 -->
		<brake_group> NONE </brake_group>
		<retractable>1</retractable>
	</contact>
	<contact type="BOGEY" name="LEFT_MLG">
		<location unit="M">
			<x> 0.81092 </x>
			<y> -4.36066 </y>
			<z> 0 </z>
		</location>
<!-- 		<static_friction> 0.5 </static_friction>  WHAT??? less static than dinamyc friction?-->
		<static_friction> 0.8 </static_friction>
		<dynamic_friction> 0.5 </dynamic_friction>
		<rolling_friction> 0.02 </rolling_friction>
		<spring_coeff unit="LBS/FT"> 59785 </spring_coeff>
		<damping_coeff unit="LBS/FT/SEC"> 23957 </damping_coeff>
		<max_steer unit="DEG"> 0.0 </max_steer>
		<brake_group> LEFT </brake_group>
		<retractable>1</retractable>
	</contact>
	<contact type="BOGEY" name="RIGHT_MLG">
		<location unit="IN">
			<x> 0.81092 </x>
			<y> 4.36066 </y>
			<z> 0 </z>
		</location>
<!-- 		<static_friction> 0.5 </static_friction>  WHAT??? less static than dinamyc friction?-->
		<static_friction> 0.8 </static_friction>
		<dynamic_friction> 0.5 </dynamic_friction>
		<rolling_friction> 0.02 </rolling_friction>
		<!--spring_coeff unit="LBS/FT"> 169785 </spring_coeff>
		<damping_coeff unit="LBS/FT/SEC"> 33957 </damping_coeff-->
		<spring_coeff unit="LBS/FT"> 59785 </spring_coeff>
		<damping_coeff unit="LBS/FT/SEC"> 23957 </damping_coeff>
		<max_steer unit="DEG"> 0.0 </max_steer>
		<brake_group> RIGHT </brake_group>
		<retractable>1</retractable>
	</contact>

	<contact type="STRUCTURE" name="NOSE_1">
		<location unit="M">
			<x> -12.33261 </x>
			<y> 0 </y>
			<z> 0.74201 </z>
		</location>
		<static_friction> 1.0 </static_friction>
		<dynamic_friction> 0.4 </dynamic_friction>
		<rolling_friction> 0.4 </rolling_friction>
		<spring_coeff unit="LBS/FT"> 50000 </spring_coeff>
		<damping_coeff unit="LBS/FT/SEC"> 50000 </damping_coeff>
		<max_steer unit="DEG"> 0.0 </max_steer>
		<brake_group> NONE </brake_group>
		<retractable>0</retractable>
	</contact>
	<contact type="STRUCTURE" name="NOSE_2">
		<location unit="M">
			<x> -14.37381 </x>
			<y> 0 </y>
			<z> 1.1446 </z>
		</location>
		<static_friction> 1.0 </static_friction>
		<dynamic_friction> 0.4 </dynamic_friction>
		<rolling_friction> 0.4 </rolling_friction>
		<spring_coeff unit="LBS/FT"> 50000 </spring_coeff>
		<damping_coeff unit="LBS/FT/SEC"> 50000 </damping_coeff>
		<max_steer unit="DEG"> 0.0 </max_steer>
		<brake_group> NONE </brake_group>
		<retractable>0</retractable>
	</contact>
	<contact type="STRUCTURE" name="CENTER_1">
		<location unit="M">
			<x> 0.43744 </x>
			<y> 0 </y>
			<z> 0.86632 </z>
		</location>
		<static_friction> 1.0 </static_friction>
		<dynamic_friction> 0.4 </dynamic_friction>
		<rolling_friction> 0.4 </rolling_friction>
		<spring_coeff unit="LBS/FT"> 50000 </spring_coeff>
		<damping_coeff unit="LBS/FT/SEC"> 50000 </damping_coeff>
		<max_steer unit="DEG"> 0.0 </max_steer>
		<brake_group> NONE </brake_group>
		<retractable>0</retractable>
	</contact>
	<contact type="STRUCTURE" name="CENTER_2">
		<location unit="M">
			<x> 8.24745 </x>
			<y> 0 </y>
			<z> 1.11635 </z>
		</location>
		<static_friction> 1.0 </static_friction>
		<dynamic_friction> 0.4 </dynamic_friction>
		<rolling_friction> 0.4 </rolling_friction>
		<spring_coeff unit="LBS/FT"> 50000 </spring_coeff>
		<damping_coeff unit="LBS/FT/SEC"> 50000 </damping_coeff>
		<max_steer unit="DEG"> 0.0 </max_steer>
		<brake_group> NONE </brake_group>
		<retractable>0</retractable>
	</contact>

	<contact type="STRUCTURE" name="ENG_1">
		<location unit="M">
			<x>0.33943</x>
			<y>-4.78698</y>
			<z>2.10356</z>
		</location>
		<static_friction> 1.0 </static_friction>
		<dynamic_friction> 0.4 </dynamic_friction>
		<rolling_friction> 0.4 </rolling_friction>
		<spring_coeff unit="LBS/FT"> 50000 </spring_coeff>
		<damping_coeff unit="LBS/FT/SEC"> 50000 </damping_coeff>
		<max_steer unit="DEG"> 0.0 </max_steer>
		<brake_group> NONE </brake_group>
		<retractable>0</retractable>
	</contact>
	<contact type="STRUCTURE" name="ENG_2">
		<location unit="M">
			<x>0.33943</x>
			<y>4.78698</y>
			<z>2.10356</z>
		</location>
		<static_friction> 1.0 </static_friction>
		<dynamic_friction> 0.5 </dynamic_friction>
		<rolling_friction> 0.4 </rolling_friction>
		<spring_coeff unit="LBS/FT"> 50000 </spring_coeff>
		<damping_coeff unit="LBS/FT/SEC"> 50000 </damping_coeff>
		<max_steer unit="DEG"> 0.0 </max_steer>
		<brake_group> NONE </brake_group>
		<retractable>0</retractable>
	</contact>


	<contact type="STRUCTURE" name="TAIL_1">
		<location unit="M">
			<x> 16.44197 </x>
			<y> 0 </y>
			<z> 3.05302 </z>
		</location>
		<static_friction> 1.0 </static_friction>
		<dynamic_friction> 0.4 </dynamic_friction>
		<rolling_friction> 0.4 </rolling_friction>
		<spring_coeff unit="LBS/FT"> 50000 </spring_coeff>
		<damping_coeff unit="LBS/FT/SEC"> 50000 </damping_coeff>
		<max_steer unit="DEG"> 0.0 </max_steer>
		<brake_group> NONE </brake_group>
		<retractable>0</retractable>
	</contact>
	<contact type="STRUCTURE" name="TAIL_2">
		<location unit="M">
			<x> 16.42078 </x>
			<y> 0 </y>
			<z> 3.43019 </z>
		</location>
		<static_friction> 1.0 </static_friction>
		<dynamic_friction> 0.4 </dynamic_friction>
		<rolling_friction> 0.4 </rolling_friction>
		<spring_coeff unit="LBS/FT"> 50000 </spring_coeff>
		<damping_coeff unit="LBS/FT/SEC"> 50000 </damping_coeff>
		<max_steer unit="DEG"> 0.0 </max_steer>
		<brake_group> NONE </brake_group>
		<retractable>0</retractable>
	</contact>
	<contact type="STRUCTURE" name="TAIL_3">
		<location unit="IN">
			<x> 18.21213 </x>
			<y> 0 </y>
			<z> 7.91958 </z>
		</location>
		<static_friction> 1.0 </static_friction>
		<dynamic_friction> 0.4 </dynamic_friction>
		<rolling_friction> 0.4 </rolling_friction>
		<spring_coeff unit="LBS/FT"> 50000 </spring_coeff>
		<damping_coeff unit="LBS/FT/SEC"> 50000 </damping_coeff>
		<max_steer unit="DEG"> 0.0 </max_steer>
		<brake_group> NONE </brake_group>
		<retractable>0</retractable>
	</contact>
	<contact type="STRUCTURE" name="TAIL_4">
		<location unit="IN">
			<x> 14.39293 </x>
			<y> 0 </y>
			<z> 7.9549 </z>
		</location>
		<static_friction> 1.0 </static_friction>
		<dynamic_friction> 1 </dynamic_friction>
		<rolling_friction> 1 </rolling_friction>
		<spring_coeff unit="LBS/FT"> 50000 </spring_coeff>
		<damping_coeff unit="LBS/FT/SEC"> 50000 </damping_coeff>
		<max_steer unit="DEG"> 0.0 </max_steer>
		<brake_group> NONE </brake_group>
		<retractable>0</retractable>
	</contact>
	<contact type="STRUCTURE" name="WING_TIP_1">
		<location unit="M">
			<x> 0.51977 </x>
			<y> -14.21847 </y>
			<z> 4.16 </z>
		</location>
		<static_friction> 1.0 </static_friction>
		<dynamic_friction> 0.4 </dynamic_friction>
		<rolling_friction> 0.4 </rolling_friction>
		<spring_coeff unit="LBS/FT"> 50000 </spring_coeff>
		<damping_coeff unit="LBS/FT/SEC"> 50000 </damping_coeff>
		<max_steer unit="DEG"> 0.0 </max_steer>
		<brake_group> NONE </brake_group>
		<retractable>0</retractable>
	</contact>
	<contact type="STRUCTURE" name="WING_TIP_2">
		<location unit="M">
			<x> 0.51977 </x>
			<y> 14.21847 </y>
			<z> 4.16 </z>
		</location>
		<static_friction> 1.0 </static_friction>
		<dynamic_friction> 1 </dynamic_friction>
		<rolling_friction> 1 </rolling_friction>
		<spring_coeff unit="LBS/FT"> 50000 </spring_coeff>
		<damping_coeff unit="LBS/FT/SEC"> 50000 </damping_coeff>
		<max_steer unit="DEG"> 0.0 </max_steer>
		<brake_group> NONE </brake_group>
		<retractable>0</retractable>
	</contact>
</ground_reactions>

<propulsion>

	<engine file="PW150A">
	<location unit="M">
		<x> -1.13603 </x>
		<y>-4.3686 </y>
		<z> 3.18561 </z>
	</location>
	<orient unit="DEG">
		<roll> 0.0 </roll>
		<pitch> 0.0 </pitch>
		<yaw> 0.0 </yaw>
	</orient>
	<feed>0</feed>
	<thruster file="R408">
		<location unit="M">
                    <x> -3.39427 </x>
                    <y> -4.36282 </y>
                    <z> 3.20629 </z>
		</location>
		<orient unit="DEG">
                    <roll> 0.0 </roll>
                    <pitch> 0.0 </pitch>
                    <yaw> 0.0 </yaw>
		</orient>
	</thruster>
	</engine>

	<engine file="PW150A">
	<location unit="M">
		<x> -1.13603 </x>
		<y>4.3686 </y>
		<z> 3.18561 </z>
	</location>
	<orient unit="DEG">
		<roll> 0.0 </roll>
		<pitch> 0.0 </pitch>
		<yaw> 0.0 </yaw>
	</orient>
	<feed>1</feed>
	<thruster file="R408">
		<location unit="M">
                    <x> -3.39427 </x>
                    <y> 4.36282 </y>
                    <z> 3.20629 </z>
		</location>
		<orient unit="DEG">
                    <roll> 0.0 </roll>
                    <pitch> 0.0 </pitch>
                    <yaw> 0.0 </yaw>
		</orient>
	</thruster>
	</engine>


	<tank type="FUEL">    <!-- Left Wing Tank -->
		<location unit="M">
			<x> 0.72524 </x>
			<y>-7.03119 </y>
			<z> 3.81664 </z>
		</location>
		<capacity unit="LBS"> 898 </capacity><!-- 1580l -->
		<contents unit="LBS"> 400 </contents>

		<priority>1</priority>
		<type>JET-A1</type>
	</tank>

	<tank type="FUEL">    <!-- Right Wing Tank -->
		<location unit="M">
			<x> 0.72524 </x>
			<y>-7.03119 </y>
			<z> 3.81664 </z>
		</location>
		<capacity unit="LBS"> 898 </capacity><!-- 1580l -->
		<contents unit="LBS"> 400 </contents>

		<priority>1</priority>
		<type>JET-A1</type>
	</tank>
</propulsion>

<system file="pushback" />
<system file="fcs" />

<flight_control name="none"/>

<aerodynamics file="Systems/q400-aerodynamics.xml" />

<external_reactions>
	<force name="pushback" frame="BODY">
		<location unit="IN">
			<x>294</x>
			<y>0</y>
			<z>-149</z>
		</location>
		<direction>
			<x>1</x>
			<y>0</y>
			<z>0</z>
		</direction>
	</force>
</external_reactions>
</fdm_config>
